/COM,ANSYS RELEASE Release 16.0      BUILD 16.0      UP20141203       12:04:00
MPTEMP
MPTEMP,     1, 0.0000000E+00,
MPDATA,EX  ,       1,   1, 0.2100000E+06,
MPTEMP
MPTEMP,     1, 0.0000000E+00,
MPDATA,NUXY,       1,   1, 0.3000000E+00,
MPTEMP
MPTEMP,     1, 0.0000000E+00,
MPDATA,DENS,       1,   1, 0.7850000E-08,
MPTEMP
MPTEMP,     1, 0.0000000E+00,
MPDATA,PRXY,       1,   1, 0.3000000E+00,
