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/batch
! ANSYS input file written by Workbench version 16.0 RELEASE
! File used for geometry attach: C:\Users\brz021\AppData\Local\Temp\WB_WIN-I6KADFM1D4I_brz021_5560_2\unsaved_project_files\dp0\SYS\DM\SYS.agdb
/title,unsaved_project--Static Structural (A5)
/com,--- Data in consistent MKS units. See Solving Units in the help system for more information.
/units,MKS
/prep7
! Turn off shape checking because checks already performed inside WB mesher.
! See help system for more information.
SHPP,OFF,,NOWARN
etcon,set             ! allow ANSYS to choose best KEYOP's for 180x elements
/com,*********** Nodes for the whole assembly ***********
nblock,3
(1i9,3e20.9e3)
        1    8.050592369E+000    5.227258674E-001    5.000000000E-001
        2    7.513886211E+000    5.227258674E-001    5.000000000E-001
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-1
/com,*********** Elements for Body 1 "Solid" ***********
et,1,186
keyo,1,2,1          ! set full integration on SOLID186
eblock,19,solid,,416
(19i9)
        1        1        1        1        0        0        0        0       20        0        1        1      659      658      627      360      671      657      656
      720     2443     2398      719     1848     2442     2440     1847      717     2445     2441     2397
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-1
/com,*********** Send User Defined Coordinate System(s) ***********
csys,0
toffst,273.15,  ! Temperature offset from absolute zero
/com,*********** Set Reference Temperature ***********
tref,22.
/com,*********** Send Materials ***********
MP,DENS,1,7850,	! kg m^-3
MP,ALPX,1,1.2e-05,	! C^-1
MP,C,1,434,	! J kg^-1 C^-1
MP,KXX,1,60.5,	! W m^-1 C^-1
MP,RSVX,1,1.7e-07,	! kg m^3 A^-2 s^-3
MP,EX,1,200000000000,	! Pa
MP,NUXY,1,0.3,
MP,MURX,1,10000,

!************************* Model Summary ********************
!Solid,	Structural Steel,	matid,	1
!************************* End Model Summary ********************
/com,*********** Send Named Selection as Node Component ***********
CMBLOCK,SELECTION,NODE,      683
(8i10)
       361       362       363       364       365       366       367       368
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CMBLOCK,SELECTION2,NODE,      683
(8i10)
       361       362       363       364       365       366       367       368
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/com,*********** Fixed Supports ***********
CMBLOCK,_FIXEDSU,NODE,      133
(8i10)
       569       570       571       572       573       574       575       576
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cmsel,s,_FIXEDSU
d,all,all
nsel,all
/com,******* Constant Zero Displacement X *******
CMBLOCK,_DISPZEROUX,NODE,      133
(8i10)
       541       542       543       544       545       546       547       548
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cmsel,s,_DISPZEROUX
d,all,ux,0
nsel,all
nsel,all
/com,*********** Define Pressure Using Surface Effect Elements ***********
et,2,154
eblock,10,,,26
(15i9)
      417        2        2        2        0      671      659      658      657     2445     2443     2441     2442
      418        2        2        2        0      672      660      659      671     2447     2444     2445     2468
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-1
esel,s,type,,2
esel,all

*DIM,_loadvari42,TABLE,2,1,1,TIME,
! Time values
_loadvari42(1,0,1) = 0.
_loadvari42(2,0,1) = 1.
! Load values
_loadvari42(1,1,1) = 0.
_loadvari42(2,1,1) = 200.

/com,*********** Create Displacement Tables and Functions ******

*DIM,_loadvari44xp,TABLE,2,1,1,TIME,
! Time values
_loadvari44xp(1,0,1) = 0.
_loadvari44xp(2,0,1) = 1.
! Load values
_loadvari44xp(1,1,1) = 0.
_loadvari44xp(2,1,1) = 0.


*DIM,_loadvari44xn,TABLE,2,1,1,TIME,
! Time values
_loadvari44xn(1,0,1) = 0.
_loadvari44xn(2,0,1) = 1.
! Load values
_loadvari44xn(1,1,1) = -0.
_loadvari44xn(2,1,1) = -0.


*DIM,_loadvari44zp,TABLE,2,1,1,TIME,
! Time values
_loadvari44zp(1,0,1) = 0.
_loadvari44zp(2,0,1) = 1.
! Load values
_loadvari44zp(1,1,1) = 0.
_loadvari44zp(2,1,1) = 1.5


*DIM,_loadvari44zn,TABLE,2,1,1,TIME,
! Time values
_loadvari44zn(1,0,1) = 0.
_loadvari44zn(2,0,1) = 1.
! Load values
_loadvari44zn(1,1,1) = -0.
_loadvari44zn(2,1,1) = -1.5

/com,*********** Create Direct FE , Pressures ****
CMBLOCK,_CM40PRES,NODE,      683
(8i10)
       361       362       363       364       365       366       367       368
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
*DIM,_loadvari40 ,TABLE,2,1,1,TIME,
! Time values
_loadvari40 (1,0,1) = 0.
_loadvari40 (2,0,1) = 1.
! Load values
_loadvari40 (1,1,1) = 0.
_loadvari40 (2,1,1) = 10000.

esel,all
/com,*********** Define Rotational Velocity ***********
cglo,4.29364926350896,6.79543627673439,0.

*DIM,_loadvari50x,TABLE,2,1,1,TIME,
! Time values
_loadvari50x(1,0,1) = 0.
_loadvari50x(2,0,1) = 1.
! Load values
_loadvari50x(1,1,1) = -0.
_loadvari50x(2,1,1) = -10.


*DIM,_loadvari50y,TABLE,2,1,1,TIME,
! Time values
_loadvari50y(1,0,1) = 0.
_loadvari50y(2,0,1) = 1.
! Load values
_loadvari50y(1,1,1) = 0.
_loadvari50y(2,1,1) = 0.


*DIM,_loadvari50z,TABLE,2,1,1,TIME,
! Time values
_loadvari50z(1,0,1) = 0.
_loadvari50z(2,0,1) = 1.
! Load values
_loadvari50z(1,1,1) = 0.
_loadvari50z(2,1,1) = 0.

fini
/com,****************************************************************************
/com,*************************    SOLUTION       ********************************
/com,****************************************************************************
/solu
antype,0                   ! static analysis
eqsl,sparse,,,,,1
cntr,print,1               ! print out contact info and also make no initial contact an error
nldiag,cont,iter           ! print out contact info each equilibrium iteration
resc,,none                 ! Do not keep any restart files
/com,****************************************************
/com,******************* SOLVE FOR LS 1 ****************
esel,s,type,,2
nsle
sf,all,pres,%_loadvari42%
nsel,all
esel,all
/com,*********** Create Composite Acceleration ***********

*DIM,_acelx,TABLE,2,1,1,TIME,
! Time values
_acelx(1,0,1) = 0.
_acelx(2,0,1) = 1.
! Load values
_acelx(1,1,1) = 0.
_acelx(2,1,1) = 0.


*DIM,_acely,TABLE,2,1,1,TIME,
! Time values
_acely(1,0,1) = 0.
_acely(2,0,1) = 1.
! Load values
_acely(1,1,1) = 0.
_acely(2,1,1) = 2.


*DIM,_acelz,TABLE,2,1,1,TIME,
! Time values
_acelz(1,0,1) = 0.
_acelz(2,0,1) = 1.
! Load values
_acelz(1,1,1) = 0.
_acelz(2,1,1) = 9.80665

acel,%_acelx%,%_acely%,%_acelz%
cgom,%_loadvari50x%,%_loadvari50y%,%_loadvari50z%
/com,*** Set Displacements ***
CMBLOCK,_CM44UZ_ZP,NODE,      133
(8i10)
       541       542       543       544       545       546       547       548
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cmsel,s,_CM44UZ_ZP
d,all,uz,%_loadvari44zp%
nsel,all
/com,**** Set Direct FE , Pressures ****
esel,u,ename,,153,156
sf,_CM40PRES,pres ,%_loadvari40 %
esel,all
nsub,1,1,1
time,1.
outres,erase
outres,all,none
outres,nsol,all
outres,rsol,all
outres,strs,all
outres,epel,all
outres,eppl,all
stabilize,off                   ! Stabilization turned OFF by user
! *********** WB SOLVE COMMAND ***********
! check interactive state
*get,ANSINTER_,active,,int
*if,ANSINTER_,ne,0,then
/eof
*endif
solve
/com *************** Write FE CONNECTORS *********
CEWRITE,file,ce,,INTE
/com,****************************************************
/com,*************** FINISHED SOLVE FOR LS 1 *************
*set,_DS_PROGRESS          ! turn off progress updates to avoid virus scanning bug
/post1
fini
