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/batch
! ANSYS input file written by Workbench version 16.0 RELEASE
! File used for geometry attach: C:\Users\brz021\AppData\Local\Temp\WB_WIN-I6KADFM1D4I_brz021_8056_2\unsaved_project_files\dp0\SYS\DM\SYS.agdb
/title,unsaved_project--Static Structural (A5)
/com,--- Data in consistent MKS units. See Solving Units in the help system for more information.
/units,MKS
/prep7
! Turn off shape checking because checks already performed inside WB mesher.
! See help system for more information.
SHPP,OFF,,NOWARN
etcon,set             ! allow ANSYS to choose best KEYOP's for 180x elements
/com,*********** Nodes for the whole assembly ***********
nblock,3
(1i9,3e20.9e3)
        1    2.812283105E+000    3.613410650E+000    1.000000000E+000
        2    1.874855404E+000    3.613410650E+000    1.000000000E+000
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-1
/com,*********** Elements for Body 1 "Solid" ***********
et,1,186
keyo,1,2,1          ! set full integration on SOLID186
eblock,19,solid,,40
(19i9)
        1        1        1        1        0        0        0        0       20        0        1        1       99      107      109       48      103      108      114
      155      434      449      156      321      441      450      322      153      433      448      453
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-1
/com,*********** Elements for Body 2 "Solid" ***********
et,2,186
keyo,2,2,1          ! set full integration on SOLID186
eblock,19,solid,,40
(19i9)
        2        2        1        2        0        0        0        0       20        0       41       13      147      133      125       48      114      108      103
      211      492      481      210      322      450      441      321      209      461      451      442
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-1
/com,*********** Send User Defined Coordinate System(s) ***********
csys,0
toffst,273.15,  ! Temperature offset from absolute zero
/com,*********** Set Reference Temperature ***********
tref,22.
/com,*********** Send Materials ***********
MP,DENS,1,7850,	! kg m^-3
MP,ALPX,1,1.2e-05,	! C^-1
MP,C,1,434,	! J kg^-1 C^-1
MP,KXX,1,60.5,	! W m^-1 C^-1
MP,RSVX,1,1.7e-07,	! kg m^3 A^-2 s^-3
MP,EX,1,200000000000,	! Pa
MP,NUXY,1,0.3,
MP,MURX,1,10000,

MP,DENS,2,7850,	! kg m^-3
MP,ALPX,2,1.2e-05,	! C^-1
MP,C,2,434,	! J kg^-1 C^-1
MP,KXX,2,60.5,	! W m^-1 C^-1
MP,RSVX,2,1.7e-07,	! kg m^3 A^-2 s^-3
MP,EX,2,190000000000,	! Pa
MP,NUXY,2,0.3,
MP,MURX,2,10000,

!************************* Model Summary ********************
!Solid,	Structural Steel,	matid,	1
!Solid,	Structural Steel 2,	matid,	2
!************************* End Model Summary ********************
/com,*********** Fixed Supports ***********
CMBLOCK,_FIXEDSU,NODE,      113
(8i10)
        25        26        27        28        29        30        31        32
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cmsel,s,_FIXEDSU
d,all,all
nsel,all
nsel,all
fini
/com,****************************************************************************
/com,*************************    SOLUTION       ********************************
/com,****************************************************************************
/solu
antype,0                   ! static analysis
eqsl,sparse,,,,,1
cntr,print,1               ! print out contact info and also make no initial contact an error
nldiag,cont,iter           ! print out contact info each equilibrium iteration
resc,,none                 ! Do not keep any restart files
/com,****************************************************
/com,******************* SOLVE FOR LS 1 ****************
/com,*********** Create Acceleration ***********

*DIM,_acelx,TABLE,2,1,1,TIME,
! Time values
_acelx(1,0,1) = 0.
_acelx(2,0,1) = 1.
! Load values
_acelx(1,1,1) = 0.
_acelx(2,1,1) = 0.


*DIM,_acely,TABLE,2,1,1,TIME,
! Time values
_acely(1,0,1) = 0.
_acely(2,0,1) = 1.
! Load values
_acely(1,1,1) = 0.
_acely(2,1,1) = 9.80665


*DIM,_acelz,TABLE,2,1,1,TIME,
! Time values
_acelz(1,0,1) = 0.
_acelz(2,0,1) = 1.
! Load values
_acelz(1,1,1) = 0.
_acelz(2,1,1) = 0.

acel,%_acelx%,%_acely%,%_acelz%
nsub,1,1,1
time,1.
outres,erase
outres,all,none
outres,nsol,all
outres,rsol,all
outres,strs,all
outres,epel,all
outres,eppl,all
stabilize,off                   ! Stabilization turned OFF by user
! *********** WB SOLVE COMMAND ***********
! check interactive state
*get,ANSINTER_,active,,int
*if,ANSINTER_,ne,0,then
/eof
*endif
solve
/com *************** Write FE CONNECTORS *********
CEWRITE,file,ce,,INTE
/com,****************************************************
/com,*************** FINISHED SOLVE FOR LS 1 *************
*set,_DS_PROGRESS          ! turn off progress updates to avoid virus scanning bug
/post1
fini
