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/batch
! ANSYS input file written by Workbench version 16.0 RELEASE
! File used for geometry attach: C:\Users\brz021\AppData\Local\Temp\WB_WIN-I6KADFM1D4I_brz021_2592_2\unsaved_project_files\dp0\SYS\DM\SYS.agdb
/title,unsaved_project--Steady-State Thermal (A5)
/com,--- Data in consistent MKS units. See Solving Units in the help system for more information.
/units,MKS
/prep7
! Turn off shape checking because checks already performed inside WB mesher.
! See help system for more information.
SHPP,OFF,,NOWARN
etcon,set             ! allow ANSYS to choose best KEYOP's for 180x elements
/com,*********** Nodes for the whole assembly ***********
nblock,3
(1i9,3e20.9e3)
        1    1.280010755E+001    8.716822659E-001    5.000000000E-001
        2    1.188581415E+001    8.716822659E-001    5.000000000E-001
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-1
/com,*********** Elements for Body 1 "Solid" ***********
et,1,90
eblock,19,solid,,420
(19i9)
        1        1        1        1        0        0        0        0       20        0        1        1      677      664      635      364      678      663      662
      726     2465     2423      725     1866     2464     2462     1865      723     2491     2463     2422
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-1
/com,*********** Send User Defined Coordinate System(s) ***********
csys,0
toffst,273.15,  ! Temperature offset from absolute zero
/com,*********** Send Materials ***********
MP,DENS,1,7850,	! kg m^-3
MP,ALPX,1,1.2e-05,	! C^-1
MP,C,1,434,	! J kg^-1 C^-1
MP,KXX,1,60.5,	! W m^-1 C^-1
MP,RSVX,1,1.7e-07,	! kg m^3 A^-2 s^-3
MP,EX,1,200000000000,	! Pa
MP,NUXY,1,0.3,
MP,MURX,1,10000,

!************************* Model Summary ********************
!Solid,	Structural Steel,	matid,	1
!************************* End Model Summary ********************
/com,*********** Send Named Selection as Node Component ***********
CMBLOCK,TEMP    ,NODE,      125
(8i10)
       547       548       549       550       551       552       553       554
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/com,*********** Send Named Selection as Node Component ***********
CMBLOCK,CONV    ,NODE,      117
(8i10)
       561       562       563       564       565       566       567       568
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/com,*********** Send Named Selection as Node Component ***********
CMBLOCK,FLUX    ,NODE,      125
(8i10)
       575       576       577       578       579       580       581       582
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/com,*********** Send Named Selection as Node Component ***********
CMBLOCK,FLOW    ,NODE,      117
(8i10)
       590       591       592       593       594       595       596       597
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/com,*********** Define Temperature Constraint ***********
CMBLOCK,_CM26   ,NODE,      125
(8i10)
       547       548       549       550       551       552       553       554
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
*DIM,_loadvari26,TABLE,2,1,1,TIME,
! Time values
_loadvari26(1,0,1) = 0.
_loadvari26(2,0,1) = 1.
! Load values
_loadvari26(1,1,1) = 22.
_loadvari26(2,1,1) = 50.

/com,*********** Create "Heat Flux" ***********
et,2,152
eblock,10,,,30
(15i9)
      421        2        2        2        0      664      635      662      663     2423     2422     2462     2463
      422        2        2        2        0      575      576      635      664     2315     2318     2423     2316
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-1
esel,s,type,,2
keyop,2,8,1      ! include heat flux

*DIM,_loadvari30,TABLE,2,1,1,TIME,
! Time values
_loadvari30(1,0,1) = 0.
_loadvari30(2,0,1) = 1.
! Load values
_loadvari30(1,1,1) = 0.
_loadvari30(2,1,1) = 12.

esel,all
/com,*********** Create "Heat Flow" ***********
et,3,152
eblock,10,,,28
(15i9)
      451        3        3        3        0      591      605      634      590     2348     2376     2346     2345
      452        3        3        3        0      592      606      605      591     2350     2374     2348     2347
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-1
esel,s,type,,3
keyop,3,8,1      ! include heat flux

*DIM,_loadvari32,TABLE,2,1,1,TIME,
! Time values
_loadvari32(1,0,1) = 0.
_loadvari32(2,0,1) = 1.
! Load values
_loadvari32(1,1,1) = 0.
_loadvari32(2,1,1) = 8.19433573699899e-002

esel,all
fcum,add                   ! add nodal forces up (needed in case have loads on the same edge,vertex)
nsel,all
fcum                       ! reset default on fcum command since done sending WB F loads
/com,*********** Create "Convection" ***********
et,4,152
eblock,10,,,28
(15i9)
      479        4        4        4        0      692      665      690      691     2468     2467     2504     2505
      480        4        4        4        0      561      562      665      692     2287     2290     2468     2288
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-1
esel,s,type,,4
keyop,4,8,2.
keyop,4,13,0.

*DIM,_convvari28,TABLE,2,1,1,TIME,
! Time values
_convvari28(1,0,1) = 0.
_convvari28(2,0,1) = 1.
! Load values
_convvari28(1,1,1) = 0.
_convvari28(2,1,1) = 2.


*DIM,_loadvari28,TABLE,2,1,1,TIME,
! Time values
_loadvari28(1,0,1) = 0.
_loadvari28(2,0,1) = 1.
! Load values
_loadvari28(1,1,1) = 22.
_loadvari28(2,1,1) = 5.

esel,all
/com,***************** Define Uniform Initial temperature ***************
tunif,22.
fini
/com,****************************************************************************
/com,*************************    SOLUTION       ********************************
/com,****************************************************************************
/solu
antype,0                   ! static analysis
!eqsl,sparse               ! using sparse solver which is default so no eqsl command needed
cntr,print,1               ! print out contact info and also make no initial contact an error
resc,,none                 ! Do not keep any restart files
rstsuppress,cont           ! Don't write contact results
/com,****************************************************
/com,******************* SOLVE FOR LS 1 ****************
d,_CM26,temp,%_loadvari26%
esel,s,type,,2
nsle
sf,all,hflux,%_loadvari30%
nsel,all
esel,all
esel,s,type,,3
nsle
sf,all,hflux,%_loadvari32%
nsel,all
esel,all
esel,s,type,,4
nsle
!sf,all,conv,%_convvari28%,%_loadvari28%
nsel,all
esel,all
autots,on
nsub,1,10,1
time,1.
outres,erase
outres,all,none
outres,nsol,all
outres,rsol,all
outres,fflux,all
esel,s,mat,,4
cm,_elmisc,elem
esel,all
outres,misc,all,_elmisc
cnvtol,heat,,.001,,1.e-006	! Program Controlled. Set MINREF equivalent of 1e-6 Watts
! *********** WB SOLVE COMMAND ***********
! check interactive state
*get,ANSINTER_,active,,int
*if,ANSINTER_,ne,0,then
/eof
*endif
solve
/com *************** Write FE CONNECTORS *********
CEWRITE,file,ce,,INTE
/com,****************************************************
/com,*************** FINISHED SOLVE FOR LS 1 *************
*set,_DS_PROGRESS          ! turn off progress updates to avoid virus scanning bug
/post1
fini
