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/batch
! ANSYS input file written by Workbench version 17.0 RELEASE
! File used for geometry attach: C:\Users\brz021\AppData\Local\Temp\WB_PC-VSB05_brz021_1796_2\unsaved_project_files\dp0\SYS\DM\SYS.agdb
/title,unsaved_project--Steady-State Thermal (A5)
/com,--- Data in consistent MKS units. See Solving Units in the help system for more information.
/units,MKS
/prep7
! Turn off shape checking because checks already performed inside WB mesher.
! See help system for more information.
SHPP,OFF,,NOWARN
etcon,set             ! allow ANSYS to choose best KEYOP's for 180x elements
/com,*********** Nodes for the whole assembly ***********
nblock,3
(1i9,3e20.9e3)
        1    0.000000000E+000    2.140883785E+000    0.000000000E+000
        2    0.000000000E+000    0.000000000E+000    0.000000000E+000
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-1
/com,*********** Elements for Body 1 "Solid" ***********
et,1,87
eblock,19,solid,,929
(19i9)
        1        1        1        1        0        0        0        0       10        0        1       22      405      407      420      671     2924      672      674
     2929     2938
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-1
/com,*********** Elements for Body 2 "Solid" ***********
et,2,87
eblock,19,solid,,987
(19i9)
        2        2        1        2        0        0        0        0       10        0      930      165      525      211      204     1538     1773     1536     1534
     1741     1737
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-1
/com,*********** Send User Defined Coordinate System(s) ***********
csys,0
toffst,273.15,  ! Temperature offset from absolute zero
/com,*********** Send Materials ***********
MP,DENS,1,7850,	! kg m^-3
MP,ALPX,1,1.2e-05,	! C^-1
MP,C,1,434,	! J kg^-1 C^-1
MP,KXX,1,60.5,	! W m^-1 C^-1
MP,RSVX,1,1.7e-07,	! kg m^3 A^-2 s^-3
MP,EX,1,200000000000,	! Pa
MP,NUXY,1,0.3,
MP,MURX,1,10000,

MP,DENS,2,7850,	! kg m^-3
MP,ALPX,2,1.2e-05,	! C^-1
MP,C,2,434,	! J kg^-1 C^-1
MPTEMP,,,,,,,,
MPTEMP,1,21
MPTEMP,2,60
MPTEMP,3,80
MPDATA,KXX,2, ,60.5,100,200,	! W m^-1 C^-1
MPTEMP,,,,,,,,
MP,RSVX,2,1.7e-07,	! kg m^3 A^-2 s^-3
MP,EX,2,200000000000,	! Pa
MP,NUXY,2,0.3,
MP,MURX,2,10000,

!************************* Model Summary ********************
!Solid,	Structural Steel,	matid,	1
!Solid,	ABC,	matid,	2
!************************* End Model Summary ********************
/com,*********** Define Temperature Constraint ***********
CMBLOCK,_CM38   ,NODE,      325
(8i10)
       121       126       127       128       129       130       131       132
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
*DIM,_loadvari38,TABLE,2,1,1,TIME,
! Time values
_loadvari38(1,0,1) = 0.
_loadvari38(2,0,1) = 1.
! Load values
_loadvari38(1,1,1) = 22.
_loadvari38(2,1,1) = 22.

/com,*********** Define Temperature Constraint ***********
CMBLOCK,_CM40   ,NODE,      127
(8i10)
        31        47        48        49        50        51        67        68
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
*DIM,_loadvari40,TABLE,2,1,1,TIME,
! Time values
_loadvari40(1,0,1) = 0.
_loadvari40(2,0,1) = 1.
! Load values
_loadvari40(1,1,1) = 22.
_loadvari40(2,1,1) = 100.

fcum,add                   ! add nodal forces up (needed in case have loads on the same edge,vertex)
fcum                       ! reset default on fcum command since done sending WB F loads
/com,***************** Define Uniform Initial temperature ***************
tunif,22.
fini
/com,****************************************************************************
/com,*************************    SOLUTION       ********************************
/com,****************************************************************************
/solu
antype,0                   ! static analysis
!eqsl,sparse               ! using sparse solver which is default so no eqsl command needed
cntr,print,1               ! print out contact info and also make no initial contact an error
resc,,none                 ! Do not keep any restart files
rstsuppress,cont           ! Don't write contact results
dmpopt,emat,no             ! Don't combine emat file for DANSYS
dmpopt,esav,no             ! Don't combine esav file for DANSYS
/com,****************************************************
/com,******************* SOLVE FOR LS 1 ****************
d,_CM38,temp,%_loadvari38%
d,_CM40,temp,%_loadvari40%
autots,on
nsub,1,10,1
time,1.
outres,erase
outres,all,none
outres,nsol,all
outres,rsol,all
outres,fflux,all
cnvtol,heat,,.001,,1.e-006	! Program Controlled. Set MINREF equivalent of 1e-6 Watts
! *********** WB SOLVE COMMAND ***********
! check interactive state
*get,ANSINTER_,active,,int
*if,ANSINTER_,ne,0,then
/eof
*endif
solve
/com *************** Write FE CONNECTORS *********
CEWRITE,file,ce,,INTE
/com,****************************************************
/com,*************** FINISHED SOLVE FOR LS 1 *************
*set,_DS_PROGRESS          ! turn off progress updates to avoid virus scanning bug
/post1
fini
